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/batch
! ANSYS input file written by Workbench version 17.2 RELEASE
! File used for geometry attach: Z:\Betreute Studentische Arbeiten\Projektarbeit Qian Sun\Programme\Platte\Vergleich_Ansys_files\dp0\SYS\DM\SYS.agdb
/title,Vergleich_Ansys--Modalanalyse (C5)
/com,--- Data in consistent MKS units. See Solving Units in the help system for more information.
/units,MKS
/prep7
! Turn off shape checking because checks already performed inside WB mesher.
! See help system for more information.
SHPP,OFF,,NOWARN
etcon,set             ! allow ANSYS to choose best KEYOP's for 180x elements
/com,*********** Nodes for the whole assembly ***********
nblock,3
(1i9,3e20.9e3)
        1    0.000000000E+000    0.000000000E+000    2.000000000E+000
        2    2.000000000E+000    0.000000000E+000    2.000000000E+000
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-1
/com,*********** Elements for Body 1 "Schalenk_rper" ***********
et,1,181
keyo,1,3,2
eblock,19,solid,,10000
(19i9)
        1        1        1        1        0        0        0        0        4        0        1     4586     8913     5003     4786
        1        1        1        1        0        0        0        0        4        0        2     4586     4587     5004     8913
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-1
/com,*********** Send User Defined Coordinate System(s) ***********
csys,0
toffst,273.15,  ! Temperature offset from absolute zero
/com,*********** Set Reference Temperature ***********
tref,22.
/com,*********** Send Materials ***********
MP,DENS,1,7850,	! kg m^-3
MP,ALPX,1,1.2e-05,	! C^-1
MP,C,1,434,	! J kg^-1 C^-1
MP,KXX,1,60.5,	! W m^-1 C^-1
MP,RSVX,1,1.7e-07,	! kg m^3 A^-2 s^-3
MP,EX,1,210000000000,	! Pa
MP,NUXY,1,0.3,
MP,MURX,1,10000,

/com,*********** Send Sheet Properties ***********
sectype,1,shell
secdata,1.e-002
secoff,mid
!************************* Model Summary ********************
!Schalenk_rper,	Baustahl,	matid,	1
!************************* End Model Summary ********************
/com,*********** Fixed Supports ***********
CMBLOCK,_FIXEDSU,NODE,      101
(8i10)
         1       102       103       104       105       106       107       108
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cmsel,s,_FIXEDSU
d,all,all
nsel,all
/com,******* Constant Zero Displacement X *******
CMBLOCK,_DISPZEROUX,NODE,      299
(8i10)
         2         3         4         5         6         7         8         9
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cmsel,s,_DISPZEROUX
d,all,ux,0
nsel,all
/com,******* Constant Zero Displacement Y *******
CMBLOCK,_DISPZEROUY,NODE,      299
(8i10)
         2         3         4         5         6         7         8         9
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cmsel,s,_DISPZEROUY
d,all,uy,0
nsel,all
/com,******* Constant Zero Displacement Z *******
CMBLOCK,_DISPZEROUZ,NODE,      299
(8i10)
         2         3         4         5         6         7         8         9
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cmsel,s,_DISPZEROUZ
d,all,uz,0
nsel,all
nsel,all
fini
/solu
antype,2                   ! modal analysis
modopt,lanb,10
outres,erase
outres,all,none
outres,nsol,all
mxpand                    ! default expand in case of complex solution
! *********** WB SOLVE COMMAND ***********
! check interactive state
*get,ANSINTER_,active,,int
*if,ANSINTER_,ne,0,then
/eof
*endif
solve
/com *************** Write FE CONNECTORS *********
CEWRITE,file,ce,,INTE
*get,_nmodalsolproc,active,0,numcpu
fini
/post1
*dim,_direction,CHAR,6,1
_direction(1) = 'X'
_direction(2) = 'Y'
_direction(3) = 'Z'
_direction(4) = 'ROTX'
_direction(5) = 'ROTY'
_direction(6) = 'ROTZ'
*do,i_mode,1,_nummodes
   *do,j_component,1,6
			*get,PFACT_%i_mode%_%j_component%,MODE,%i_mode%,PFACT,,DIREC,_direction(%j_component%)
   *enddo
*enddo
fini
